# OpenSim document version 30000
ForwardTool ie45_sim:
  model_file: ../runner18_scaled_fixed45.osim
  replace_force_set: false
  initial_time: 0
  final_time: 28
  results_directory: .
  output_precision: 8
  initial_time: 0
  final_time: 28
  solve_for_equilibrium_for_auxiliary_states: false
  maximum_number_of_integrator_steps: 20000
  maximum_integrator_step_size: 1
  minimum_integrator_step_size: 1e-8
  integrator_error_tolerance: 1e-5
  external_loads_file: input_force_ie45.xml
  use_specified_dt: false
  AnalysisSet Analyses:
    ForceReporter: start_time=0 end_time=28 step_interval=1 in_degrees=true include_constraint_forces=false
