# OpenSim document version 30000
ForwardTool Runner18:
  model_file: ../runner18_scaled_passiveFlex.osim
  replace_force_set: false
  results_directory: .
  output_precision: 8
  initial_time: 0
  final_time: 40
  solve_for_equilibrium_for_auxiliary_states: false
  maximum_number_of_integrator_steps: 20000
  maximum_integrator_step_size: 1
  minimum_integrator_step_size: 1e-8
  integrator_error_tolerance: 1e-5
  use_specified_dt: false
  AnalysisSet Analyses:
    ForceReporter: start_time=0 end_time=10 step_interval=1 in_degrees=true include_constraint_forces=false
    PointKinematics: start_time=0 end_time=1 step_interval=1 in_degrees=true body_name=tibia_r
        relative_to_body_name=ground point_name=pACL_t point=(0.008 -0.034 0)
