# OpenSim document version 30000
Model Runner18:
  length_units: meters
  force_units: N
  gravity: 0 0 0
  credits:
    Delp S.L., Loan J.P., Hoy M.G., Zajac F.E., Topp E.L., Rosen J.M., Thelen D.G., Anderson F.C., Seth A.
  publications:
    Notes: 3D, 23 DOF gait model created by D.G. Thelen, Univ. of Wisconsin-Madison, and Ajay Seth, Frank C. Anderson, and Scott L. Delp, Stanford University. Lower extremity joint defintions based on Delp et al. (1990). Low back joint and anthropometry based on Anderson and Pandy (1999, 2001). Planar knee model of Yamaguchi and Zajac (1989). Seth removed the patella to avoid kinematic constraints; insertions of the quadrucepts are handled with moving points in the tibia frame. Delp, S.L., Loan, J.P., Hoy, M.G., Zajac, F.E., Topp E.L., Rosen, J.M.: An interactive graphics-based model of the lower extremity to study orthopaedic surgical procedures, IEEE Transactions on Biomedical Engineering, vol. 37, pp. 757-767, 1990. Yamaguchi G.T., Zajac F.E.: A planar model of the knee joint to characterize the knee extensor mechanism." J . Biomecl7. vol. 21. pp. 1-10. 1989. Anderson F.C., Pandy M.G.: A dynamic optimization solution for vertical jumping in three dimensions. Computer Methods in Biomechanics and Biomedical Engineering 2:201-231, 1999. Anderson F.C., Pandy M.G.: Dynamic optimization of human walking. Journal of Biomechanical Engineering 123:381-390, 2001.
  BodySet:
    Body ground: mass=0 mass_center=(0 0 0) inertia_xx=0 inertia_yy=0 inertia_zz=0
    Body pelvis: mass=12.14892 mass_center=(-0.0796082 0 0) inertia_xx=0.1344537 inertia_yy=0.1139194
        inertia_zz=0.07572831 meshes=(sacrum.vtp pelvis.vtp l_pelvis.vtp)
      CustomJoint ground_pelvis: parent_body=ground location_in_parent=(0 0 0) location=(0 0 0)
        Coordinate pelvis_tilt: motion_type=rotational default_value=0 range=(-1.570796 1.570796) clamped=false
            locked=true
        Coordinate pelvis_list: motion_type=rotational default_value=0 range=(-1.570796 1.570796) clamped=false
            locked=true
        Coordinate pelvis_rotation: motion_type=rotational default_value=0 range=(-1.570796 1.570796) clamped=false
            locked=true
        Coordinate pelvis_tx: motion_type=translational default_value=0 range=(-5 5) clamped=false locked=true
        Coordinate pelvis_ty: motion_type=translational default_value=0 range=(-1 2) clamped=false locked=true
        Coordinate pelvis_tz: motion_type=translational default_value=0 range=(-3 3) clamped=false locked=true
        SpatialTransform:
          TransformAxis rotation1: coordinates=pelvis_tilt axis=(0 0 1) LinearFunction(coefficients=1 0)
          TransformAxis rotation2: coordinates=pelvis_list axis=(1 0 0) LinearFunction(coefficients=1 0)
          TransformAxis rotation3: coordinates=pelvis_rotation axis=(0 1 0) LinearFunction(coefficients=1 0)
          TransformAxis translation1: coordinates=pelvis_tx axis=(1 0 0) LinearFunction(coefficients=1 0)
          TransformAxis translation2: coordinates=pelvis_ty axis=(0 1 0) LinearFunction(coefficients=1 0)
          TransformAxis translation3: coordinates=pelvis_tz axis=(0 0 1) LinearFunction(coefficients=1 0)
    Body femur_r: mass=9.595138 mass_center=(0 -0.19278 0) inertia_xx=0.1776273 inertia_yy=0.04656248
        inertia_zz=0.1873112
        meshes=(femur_r.vtp C:\Users\noah-\Desktop\Knee_Model_V2\Geometry\OK_femur_cartilage_lat.obj C:\Users\noah-\Desktop\Knee_Model_V2\Geometry\OK_femur_cartilage_med.obj C:\Users\noah-\Desktop\Knee_Model_V2\Geometry\OK_femur.obj)
      CustomJoint hip_r: parent_body=pelvis location_in_parent=(-0.0878801 -0.0821623 0.1037905) location=(0 0 0)
        Coordinate hip_flexion_r: motion_type=rotational default_value=0 range=(-2.094395 2.094395) clamped=false
            locked=true
        Coordinate hip_adduction_r: motion_type=rotational default_value=0 range=(-2.094395 2.094395) clamped=false
            locked=true
        Coordinate hip_rotation_r: motion_type=rotational default_value=0 range=(-2.094395 2.094395) clamped=false
            locked=true
        SpatialTransform: axes_held_at_zero=(translation1 translation2 translation3)
          TransformAxis rotation1: coordinates=hip_flexion_r axis=(0 0 1) LinearFunction(coefficients=1 0)
          TransformAxis rotation2: coordinates=hip_adduction_r axis=(1 0 0) LinearFunction(coefficients=1 0)
          TransformAxis rotation3: coordinates=hip_rotation_r axis=(0 1 0) LinearFunction(coefficients=1 0)
      WrapEllipsoid femur_med: translation=(0.01 -0.45 -0.003) quadrant=-z dimensions=(0.04 0.04 0.04)
      WrapCylinder femur_quads: xyz_body_rotation=(-0.1 0 0) translation=(0.014 -0.458 0) quadrant=+x radius=0.025
          length=0.08
    Body patella_r: mass=0.4875 mass_center=(0.0018 0.0264 0) inertia_xx=0.000016 inertia_yy=0.000074
        inertia_zz=0.000074 meshes=patella_r.vtp
      CustomJoint pf_r: parent_body=femur_r location_in_parent=(0 0 0) location=(0 0 0)
        Coordinate pf_ty_r: motion_type=translational default_value=-0.47 range=(-0.6 0) clamped=false
        SpatialTransform: axes_held_at_zero=(rotation2 rotation3 translation3)
          TransformAxis rotation1: coordinates=pf_ty_r axis=(0 0 1)
            NaturalCubicSpline: x=(-0.52 -0.515 -0.51 -0.505 -0.5 -0.495 -0.49 -0.485 -0.48 -0.475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)
                y=(-0.88967 -0.83733 -0.75011 -0.628 -0.48844 -0.33144 -0.20933 -0.12211 -0.069778 -0.017444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)
          TransformAxis translation1: coordinates=pf_ty_r axis=(1 0 0)
            NaturalCubicSpline: x=(-0.52 -0.515 -0.51 -0.505 -0.5 -0.495 -0.49 -0.485 -0.48 -0.475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)
                y=(-0.0033883 0.0031292 0.0096467 0.016164 0.022682 0.029199 0.035155 0.039535 0.042598 0.044727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)
          TransformAxis translation2: coordinates=pf_ty_r axis=(0 1 0) LinearFunction(coefficients=1 0)
    Body tibia_r: mass=3.824583 mass_center=(0 -0.153094 0) inertia_xx=0.03495917 inertia_yy=0.003537535
        inertia_zz=0.03544472
        meshes=(tibia_r.vtp fibula.vtp C:\Users\noah-\Desktop\Knee_Model_V2\Geometry\OK_tibia.obj)
      CustomJoint knee_r: parent_body=femur_r location_in_parent=(0 0 0) location=(0 0 0)
        Coordinate knee_angle_r: motion_type=rotational default_value=0 range=(-2.094395 0.1745329) clamped=false
            prescribed=true
          prescribed_function: SimmSpline: x=(0 0.01 0.02 0.03 0.04 0.05 0.06 0.07 0.08 0.09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) [N]
              y=(0 0 0 0 0 0 0 0 0 0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)
        Coordinate knee_add_r: motion_type=rotational default_value=0 range=(-2.094395 0.1745329) clamped=false
        Coordinate knee_rot_r: motion_type=rotational default_value=0 range=(-2.094395 0.1745329) clamped=false
        Coordinate knee_tx_r: motion_type=translational default_value=-0.006 range=(-0.1 0.1) clamped=false
        Coordinate knee_ty_r: motion_type=translational default_value=-0.449 range=(-1 1) clamped=false
        Coordinate knee_tz_r: motion_type=translational default_value=0 range=(-0.1 0.1) clamped=false
        SpatialTransform:
          TransformAxis rotation1: coordinates=knee_angle_r axis=(0 0 1) LinearFunction(coefficients=1 0)
          TransformAxis rotation2: coordinates=knee_add_r axis=(1 0 0) LinearFunction(coefficients=1 0)
          TransformAxis rotation3: coordinates=knee_rot_r axis=(0 1 0) LinearFunction(coefficients=1 0)
          TransformAxis translation1: coordinates=knee_tx_r axis=(1 0 0) LinearFunction(coefficients=1 0)
          TransformAxis translation2: coordinates=knee_ty_r axis=(0 1 0) LinearFunction(coefficients=1 0)
          TransformAxis translation3: coordinates=knee_tz_r axis=(0 0 1) LinearFunction(coefficients=1 0)
  ForceSet:
    BushingForce rot_damper: body_1=femur_r body_2=tibia_r location_body_1=(0 0 0) orientation_body_1=(0 0 0)
        location_body_2=(0 0 0) orientation_body_2=(0 0 0) rotational_stiffness=(0 0 0) translational_stiffness=(0 0 0)
        rotational_damping=(0.1 0.1 0.1) translational_damping=(0.1 0.1 0.1)
    ElasticFoundationForce medial_tf: transition_velocity=0
      ContactParametersSet:
        ContactParameters: geometry=(medial_plateau OK_femur_cartilage_med) stiffness=100e9 dissipation=10
            static_friction=0 dynamic_friction=0 viscous_friction=0
    ElasticFoundationForce lateral_tf: transition_velocity=0
      ContactParametersSet:
        ContactParameters: geometry=(lateral_plateau OK_femur_cartilage_lat) stiffness=100e9 dissipation=10
            static_friction=0 dynamic_friction=0 viscous_friction=0
    Ligament [values shared by the 18 below unless stated]:
      force_length_curve: SimmSpline: x=(0.99 0.995 1 1.005 1.01 1.015 1.02 1.025 1.03 1.04 1.09 1.14 1.19 1.24 1.29)
          y=(0 0 0 0.0002083333 0.0008333333 0.001875 0.003333333 0.005208333 0.0075 0.01333333 0.06 0.11 0.16 0.21 0.26)
    Ligament aACL: resting_length=0.037 pcsa_force=3600
      PathPoint aACL_f: femur_r (-0.009 -0.453 0.011)
      PathPoint aACL_t: tibia_r (0.011 -0.034 0)
    Ligament pACL: resting_length=0.03 pcsa_force=4000
      PathPoint pACL_f: femur_r (-0.011 -0.458 0.011)
      PathPoint pACL_t: tibia_r (0.008 -0.034 0)
    Ligament aPCL: resting_length=0.034 pcsa_force=3600
      PathPoint aPCL_f: femur_r (0.002 -0.463 -0.006)
      PathPoint aPCL_t: tibia_r (-0.02 -0.034 0)
    Ligament pPCL: resting_length=0.032 pcsa_force=1600
      PathPoint pPCL_f: femur_r (-0.004 -0.463 -0.006)
      PathPoint pPCL_t: tibia_r (-0.022 -0.034 0)
    Ligament LCL: resting_length=0.049 pcsa_force=2700
      PathPoint LCL_f: femur_r (-0.002 -0.455 0.04)
      PathPoint LCL_t: tibia_r (-0.004 -0.058 0.038)
    Ligament PFL: resting_length=0.046 pcsa_force=1620
      PathPoint PFL_f: femur_r (0 -0.46 0.04)
      PathPoint PFL_t: tibia_r (-0.008 -0.058 0.038)
    Ligament CAPa: resting_length=0.056 pcsa_force=1350
      PathPoint CAPa_f: femur_r (-0.025 -0.465 -0.025)
      PathPoint CAPa_t: tibia_r (-0.02 -0.056 0.026)
    Ligament CAPl: resting_length=0.036 pcsa_force=2000
      PathPoint CAPl_f: femur_r (-0.025 -0.465 0.025)
      PathPoint CAPl_t: tibia_r (-0.02 -0.056 0.026)
    Ligament CAPo: resting_length=0.06 pcsa_force=1500
      PathPoint CAPo_f: femur_r (-0.025 -0.465 0.025)
      PathPoint CAPo_t: tibia_r (-0.02 -0.056 -0.026)
    Ligament CAPm: resting_length=0.036 pcsa_force=2000
      PathPoint CAPm_f: femur_r (-0.025 -0.465 -0.025)
      PathPoint CAPm_t: tibia_r (-0.02 -0.056 -0.026)
    Ligament aMCL: resting_length=0.077 pcsa_force=2000
      PathPoint aMCL_f: femur_r (0.01 -0.45 -0.045)
      PathPoint aMCL_t: tibia_r (0.015 -0.081 -0.02)
      PathWrap: wrap_object=femur_med method=hybrid
    Ligament iMCL: resting_length=0.082 pcsa_force=2000
      PathPoint iMCL_f: femur_r (0.007 -0.45 -0.045)
      PathPoint iMCL_t: tibia_r (0.012 -0.084 -0.02)
      PathWrap: wrap_object=femur_med method=hybrid
    Ligament pMCL: resting_length=0.044 pcsa_force=4000
      PathPoint pMCL_f: femur_r (0.007 -0.45 -0.045)
      PathPoint pMCL_t: tibia_r (-0.008 -0.044 -0.033)
      PathWrap: wrap_object=femur_med method=hybrid
    Ligament aCM: resting_length=0.051 pcsa_force=2000
      PathPoint aCM_f: femur_r (0.01 -0.45 -0.045)
      PathPoint aCM_t: tibia_r (0.013 -0.051 -0.03)
      PathWrap: wrap_object=femur_med method=hybrid
    Ligament pCM: resting_length=0.047 pcsa_force=1800
      PathPoint pCM_f: femur_r (0.007 -0.45 -0.045)
      PathPoint pCM_t: tibia_r (0.009 -0.051 -0.03)
      PathWrap: wrap_object=femur_med method=hybrid
    Ligament cPT: resting_length=0.048 pcsa_force=6000
      PathPoint cPT_f: patella_r (0 0 0)
      PathPoint cPT_t: tibia_r (0.03 -0.064 0)
    Ligament mPT: resting_length=0.053 pcsa_force=6000
      PathPoint mPT_f: patella_r (0 0.005 -0.008)
      PathPoint mPT_t: tibia_r (0.03 -0.064 -0.004)
    Ligament lPT: resting_length=0.053 pcsa_force=6000
      PathPoint lPT_f: patella_r (0 0.005 0.008)
      PathPoint lPT_t: tibia_r (0.03 -0.064 0.004)
    Thelen2003Muscle [values shared by the 21 below unless stated]: min_control=0 optimal_fiber_length=0.1033689
        tendon_slack_length=0.1463425 pennation_angle_at_optimal=0.08726646 [radians] max_contraction_velocity=10
        activation_time_constant=0.01 deactivation_time_constant=0.04 FmaxTendonStrain=0.033 FmaxMuscleStrain=0.6
        KshapeActive=0.5 KshapePassive=4 Af=0.3 Flen=1.8 max_control=0 optimal_force=0 max_isometric_force=0
    Thelen2003Muscle vas_med_r: max_control=1 optimal_force=1 max_isometric_force=1294
      PathPoint P1: femur_r (0.015876 -0.238027 0.0213192)
      PathPoint P2: femur_r (0.0403704 -0.314005 0.0010206)
      PathPoint P3: patella_r (0 0.048 -0.015)
      PathWrap: wrap_object=femur_quads method=hybrid
    Thelen2003Muscle vas_int_r: max_control=1 optimal_force=1 max_isometric_force=1365 optimal_fiber_length=0.101953
        tendon_slack_length=0.1593748 pennation_angle_at_optimal=0.05235988
      PathPoint P1: femur_r (0.032886 -0.218182 0.035154)
      PathPoint P2: femur_r (0.037989 -0.236326 0.032319)
      PathPoint P3: patella_r (0 0.05 0)
      PathWrap: wrap_object=femur_quads method=hybrid
    Thelen2003Muscle vas_lat_r: max_control=1 optimal_force=1 max_isometric_force=1871 optimal_fiber_length=0.09691755
        tendon_slack_length=0.1811435
      PathPoint P1: femur_r (0.0054432 -0.210244 0.0395766)
      PathPoint P2: femur_r (0.0305046 -0.293819 0.0463806)
      PathPoint P3: patella_r (0 0.048 0.015)
      PathWrap: wrap_object=femur_quads method=hybrid
    Thelen2003Muscle aACL_muscle:
      PathPoint aACL_f: femur_r (-0.009 -0.453 0.011)
      PathPoint aACL_t: tibia_r (0.011 -0.034 0)
    Thelen2003Muscle pACL_muscle:
      PathPoint pPCL_f: femur_r (-0.004 -0.463 -0.006)
      PathPoint pPCL_t: tibia_r (-0.022 -0.034 0)
    Thelen2003Muscle aPCL_muscle:
      PathPoint aPCL_f: femur_r (0.002 -0.463 -0.006)
      PathPoint aPCL_t: tibia_r (-0.02 -0.034 0)
    Thelen2003Muscle pPCL_muscle:
      PathPoint pPCL_f: femur_r (-0.004 -0.463 -0.006)
      PathPoint pPCL_t: tibia_r (-0.022 -0.034 0)
    Thelen2003Muscle LCL_muscle:
      PathPoint LCL_f: femur_r (-0.002 -0.455 0.04)
      PathPoint LCL_t: tibia_r (-0.004 -0.058 0.038)
    Thelen2003Muscle PFL_muscle:
      PathPoint PFL_f: femur_r (0 -0.46 0.04)
      PathPoint PFL_t: tibia_r (-0.008 -0.058 0.038)
    Thelen2003Muscle CAPa_muscle:
      PathPoint CAPa_f: femur_r (-0.025 -0.465 -0.025)
      PathPoint CAPa_t: tibia_r (-0.02 -0.056 0.026)
    Thelen2003Muscle CAPl_muscle:
      PathPoint CAPl_f: femur_r (-0.025 -0.465 0.025)
      PathPoint CAPl_t: tibia_r (-0.02 -0.056 0.026)
    Thelen2003Muscle CAPo_muscle:
      PathPoint CAPo_f: femur_r (-0.025 -0.465 0.025)
      PathPoint CAPo_t: tibia_r (-0.02 -0.056 -0.026)
    Thelen2003Muscle CAPm_muscle:
      PathPoint CAPm_f: femur_r (-0.025 -0.465 -0.025)
      PathPoint CAPm_t: tibia_r (-0.02 -0.056 -0.026)
    Thelen2003Muscle aMCL_muscle:
      PathPoint aMCL_f: femur_r (0.01 -0.45 -0.045)
      PathPoint aMCL_t: tibia_r (0.015 -0.081 -0.02)
      PathWrap: wrap_object=femur_med method=hybrid
    Thelen2003Muscle iMCL_muscle:
      PathPoint iMCL_f: femur_r (0.007 -0.45 -0.045)
      PathPoint iMCL_t: tibia_r (0.012 -0.084 -0.02)
      PathWrap: wrap_object=femur_med method=hybrid
    Thelen2003Muscle pMCL_muscle:
      PathPoint pMCL_f: femur_r (0.007 -0.45 -0.045)
      PathPoint pMCL_t: tibia_r (-0.008 -0.044 -0.033)
      PathWrap: wrap_object=femur_med method=hybrid
    Thelen2003Muscle aCM_muscle:
      PathPoint aCM_f: femur_r (0.01 -0.45 -0.045)
      PathPoint aCM_t: tibia_r (0.013 -0.051 -0.03)
      PathWrap: wrap_object=femur_med method=hybrid
    Thelen2003Muscle pCM_muscle:
      PathPoint pCM_f: femur_r (0.007 -0.45 -0.045)
      PathPoint pCM_t: tibia_r (0.009 -0.051 -0.03)
      PathWrap: wrap_object=femur_med method=hybrid
    Thelen2003Muscle cPT_muscle:
      PathPoint cPT_f: patella_r (0 0 0)
      PathPoint cPT_t: tibia_r (0.03 -0.064 0)
    Thelen2003Muscle mPT_muscle:
      PathPoint mPT_f: patella_r (0 0.005 -0.008)
      PathPoint mPT_t: tibia_r (0.03 -0.064 -0.004)
    Thelen2003Muscle lPT_muscle:
      PathPoint lPT_f: patella_r (0 0.005 0.008)
      PathPoint lPT_t: tibia_r (0.03 -0.064 0.004)
  ContactGeometrySet:
    ContactMesh medial_plateau: body_name=tibia_r location=(0 -0.0374 -0.018) orientation=(-0.035 -0.087 0.035)
        filename=.\Geometry\tibial_plane.obj
    ContactMesh OK_femur_cartilage_med: body_name=femur_r location=(0 0 0)
        filename=C:\Users\noah-\Desktop\Knee_Model_V2\Geometry\OK_femur_cartilage_med.obj
    ContactMesh lateral_plateau: body_name=tibia_r location=(0 -0.0352 0.023) orientation=(0.035 -0.087 0.122)
        filename=.\Geometry\tibial_plane.obj
    ContactMesh OK_femur_cartilage_lat: body_name=femur_r location=(0 0 0)
        filename=C:\Users\noah-\Desktop\Knee_Model_V2\Geometry\OK_femur_cartilage_lat.obj
