# OpenSim document version 20302
Model Hang_3R_3T:
  credits: Model authors names..
  publications: List of publications related to model...
  length_units: meters
  force_units: N
  gravity: 0 -9.80665 0
  defaults: Thelen2003Muscle default: min_control=0.01 max_control=1 optimal_force=1 max_isometric_force=546
      optimal_fiber_length=0.0535 tendon_slack_length=0.078 pennation_angle_at_optimal=0 max_contraction_velocity=10
      activation_time_constant=0.01 deactivation_time_constant=0.04 Vmax=10 Vmax0=5 FmaxTendonStrain=0.033
      FmaxMuscleStrain=0.6 KshapeActive=0.5 KshapePassive=4 damping=0.05 Af=0.3 Flen=1.8
  ForceSet:
    Ligament [values shared by the 20 below unless stated]:
      force_length_curve: NaturalCubicSpline: x=(-1 -0.5 -0.2 0 0.01 0.02 0.03 0.04 0.05 0.06 0.07 0.1 0.13 0.15 0.2 0.4 0.7 1)
          y=(0 0 0 0 0.00083333 0.00333333 0.0075 0.01333333 0.02083333 0.03 0.04 0.07 0.1 0.12 0.17 0.37 0.67 0.97)
    Ligament aACL_r: resting_length=0.03171 pcsa_force=1500
      PathPoint P1: tibia_r (0.0166 -0.0301 -0.0007)
      PathPoint P2: femur_r (-0.0072 -0.4004 0.0041)
    Ligament pACL_r: resting_length=0.02446 pcsa_force=1600
      PathPoint P1: tibia_r (0.0025 -0.0325 0)
      PathPoint P2: femur_r (-0.015 -0.4098 0.01)
    Ligament aPCL_r: resting_length=0.03349 pcsa_force=2600
      PathPoint P1: tibia_r (-0.0205 -0.0331 0.0033)
      PathPoint P2: femur_r (-0.0087 -0.4134 -0.0093)
    Ligament pPCL_r: resting_length=0.02474 pcsa_force=1900
      PathPoint P1: tibia_r (-0.0147 -0.0318 -0.0041)
      PathPoint P2: femur_r (-0.0159 -0.4057 -0.0163)
    Ligament LCL_r: resting_length=0.05482 pcsa_force=2000
      PathPoint P1: tibia_r (-0.0071 -0.0606 0.0373)
      PathPoint P2: femur_r (-0.0098 -0.4006 0.0345)
    Ligament aMCL_r: resting_length=0.07082 pcsa_force=2500
      PathPoint P1: tibia_r (0.0077 -0.0796 -0.0276)
      PathPoint P2: femur_r (-0.0074 -0.4044 -0.035)
    Ligament iMCL_r: resting_length=0.0703 pcsa_force=3000
      PathPoint P1: tibia_r (0.0025 -0.0826 -0.0291)
      PathPoint P2: femur_r (-0.0127 -0.4062 -0.0335)
    Ligament pMCL_r: resting_length=0.08623 pcsa_force=2500
      PathPoint P1: tibia_r (0.0025 -0.094 -0.0264)
      PathPoint P2: femur_r (-0.0178 -0.4036 -0.0335)
    Ligament aDMCL_r: resting_length=0.03944 pcsa_force=2000
      PathPoint P1: tibia_r (0.0047 -0.044 -0.035)
      PathPoint P2: femur_r (-0.0074 -0.4044 -0.035)
    Ligament pDMCL_r: resting_length=0.03609 pcsa_force=4500
      PathPoint P1: tibia_r (-0.005 -0.044 -0.035)
      PathPoint P2: femur_r (-0.0178 -0.4036 -0.0335)
    Ligament aACL_l: resting_length=0.03171 pcsa_force=1500
      PathPoint P1: tibia_l (0.0166 -0.0301 0.0007)
      PathPoint P2: femur_l (-0.0072 -0.4004 -0.0041)
    Ligament pACL_l: resting_length=0.02446 pcsa_force=1600
      PathPoint P1: tibia_l (0.0025 -0.0325 0)
      PathPoint P2: femur_l (-0.015 -0.4098 -0.01)
    Ligament aPCL_l: resting_length=0.03349 pcsa_force=2600
      PathPoint P1: tibia_l (-0.0205 -0.0331 -0.0033)
      PathPoint P2: femur_l (-0.0087 -0.4134 0.0093)
    Ligament pPCL_l: resting_length=0.02474 pcsa_force=1900
      PathPoint P1: tibia_l (-0.0147 -0.0318 0.0041)
      PathPoint P2: femur_l (-0.0159 -0.4057 0.0163)
    Ligament LCL_l: resting_length=0.05482 pcsa_force=2000
      PathPoint P1: tibia_l (-0.0071 -0.0606 -0.0373)
      PathPoint P2: femur_l (-0.0098 -0.4006 -0.0345)
    Ligament aMCL_l: resting_length=0.07082 pcsa_force=2500
      PathPoint P1: tibia_l (0.0077 -0.0796 0.0276)
      PathPoint P2: femur_l (-0.0074 -0.4044 0.035)
    Ligament iMCL_l: resting_length=0.0703 pcsa_force=3000
      PathPoint iMCL_r-P1: tibia_l (0.0025 -0.0826 0.0291)
      PathPoint P2: femur_l (-0.0127 -0.4062 0.0335)
    Ligament pMCL_l: resting_length=0.08623 pcsa_force=2500
      PathPoint P1: tibia_l (0.0025 -0.094 0.0264)
      PathPoint P2: femur_l (-0.0178 -0.4036 0.0335)
    Ligament aDMCL_l: resting_length=0.03944 pcsa_force=2000
      PathPoint P1: tibia_l (0.0047 -0.044 0.035)
      PathPoint P2: femur_l (-0.0074 -0.4044 0.035)
    Ligament pDMCL_l: resting_length=0.03609 pcsa_force=4500
      PathPoint P1: tibia_l (-0.005 -0.044 0.035)
      PathPoint P2: femur_l (-0.0178 -0.4036 0.0335)
    Thelen2003Muscle [values shared by the 56 below unless stated]: min_control=0 max_control=1 optimal_force=1
        max_contraction_velocity=10 activation_time_constant=0.01 deactivation_time_constant=0.04 Vmax=10 Vmax0=5
        FmaxTendonStrain=0.033 FmaxMuscleStrain=0.6 KshapeActive=0.5 KshapePassive=4 damping=0.05 Af=0.3 Flen=1.8
    Thelen2003Muscle glut_med1_r: max_isometric_force=1119 optimal_fiber_length=0.0535 tendon_slack_length=0.078
        pennation_angle_at_optimal=0.1396263
      PathPoint P1: pelvis (-0.0408 0.0304 0.1209)
      PathPoint P2: femur_r (-0.0218 -0.0117 0.0555)
    Thelen2003Muscle glut_med2_r: max_isometric_force=873 optimal_fiber_length=0.0845 tendon_slack_length=0.053
        pennation_angle_at_optimal=0
      PathPoint P1: pelvis (-0.0855 0.0445 0.0766)
      PathPoint P2: femur_r (-0.0258 -0.0058 0.0527)
    Thelen2003Muscle glut_med3_r: max_isometric_force=1000 optimal_fiber_length=0.0646 tendon_slack_length=0.053
        pennation_angle_at_optimal=0.3316126
      PathPoint P1: pelvis (-0.1223 0.0105 0.0648)
      PathPoint P2: femur_r (-0.0309 -0.0047 0.0518)
    Thelen2003Muscle bifemlh_r: max_isometric_force=2700 optimal_fiber_length=0.109 tendon_slack_length=0.326
        pennation_angle_at_optimal=0
      PathPoint P1: pelvis (-0.12596 -0.10257 0.06944)
      PathPoint P2: tibia_r (-0.0301 -0.036 0.02943)
      PathPoint P3: tibia_r (-0.0234 -0.0563 0.0343)
    Thelen2003Muscle bifemsh_r: max_isometric_force=804 optimal_fiber_length=0.173 tendon_slack_length=0.089
        pennation_angle_at_optimal=0.4014257
      PathPoint P1: femur_r (0.005 -0.2111 0.0234)
      PathPoint P2: tibia_r (-0.0301 -0.036 0.02943)
      PathPoint P3: tibia_r (-0.0234 -0.0563 0.0343)
    Thelen2003Muscle sar_r: max_isometric_force=156 optimal_fiber_length=0.52 tendon_slack_length=0.1
        pennation_angle_at_optimal=0
      PathPoint P1: pelvis (-0.0153 -0.0013 0.1242)
      PathPoint P2: femur_r (-0.003 -0.3568 -0.0421)
      PathPoint P3: tibia_r (-0.0056 -0.0419 -0.0399)
      PathPoint P4: tibia_r (0.006 -0.0589 -0.0383)
      PathPoint P5: tibia_r (0.0243 -0.084 -0.0252)
    Thelen2003Muscle add_mag2_r: max_isometric_force=2343 optimal_fiber_length=0.121 tendon_slack_length=0.12
        pennation_angle_at_optimal=0.05235988
      PathPoint P1: pelvis (-0.0831 -0.1192 0.0308)
      PathPoint P2: femur_r (0.0054 -0.2285 0.0227)
    Thelen2003Muscle tfl_r: max_isometric_force=233 optimal_fiber_length=0.095 tendon_slack_length=0.425
        pennation_angle_at_optimal=0.05235988
      PathPoint P1: pelvis (-0.0311 0.0214 0.1241)
      PathPoint P2: femur_r (0.0294 -0.0995 0.0597)
      PathPoint P3: femur_r (0.0054 -0.4049 0.0357)
      PathPoint P4: tibia_r (0.006 -0.0487 0.0297)
    Thelen2003Muscle pect_r: max_isometric_force=266 optimal_fiber_length=0.1 tendon_slack_length=0.033
        pennation_angle_at_optimal=0
      PathPoint P1: pelvis (-0.0431 -0.0768 0.0451)
      PathPoint P2: femur_r (-0.0122 -0.0822 0.0253)
    Thelen2003Muscle grac_r: max_isometric_force=162 optimal_fiber_length=0.352 tendon_slack_length=0.126
        pennation_angle_at_optimal=0.05235988
      PathPoint P1: pelvis (-0.07401 -0.1187 0.02794)
      ConditionalPathPoint P2: tibia_r (-0.02657 -0.0319 -0.03774) range=(-0.4363323 0.1745329)
          coordinate=knee_extend_r
      PathPoint P3: tibia_r (-0.01943 -0.05153 -0.0358)
      PathPoint P4: tibia_r (0.006 -0.0836 -0.0228)
    Thelen2003Muscle glut_max1_r: max_isometric_force=573 optimal_fiber_length=0.142 tendon_slack_length=0.125
        pennation_angle_at_optimal=0.08726646
      PathPoint P1: pelvis (-0.1195 0.0612 0.07)
      PathPoint P2: pelvis (-0.1291 0.0012 0.0886)
      PathPoint P3: femur_r (-0.0457 -0.0248 0.0392)
      PathPoint P4: femur_r (-0.0277 -0.0566 0.047)
    Thelen2003Muscle glut_max2_r: max_isometric_force=819 optimal_fiber_length=0.147 tendon_slack_length=0.127
        pennation_angle_at_optimal=0
      PathPoint P1: pelvis (-0.1349 0.0176 0.0563)
      PathPoint P2: pelvis (-0.1376 -0.052 0.0914)
      PathPoint P3: femur_r (-0.0426 -0.053 0.0293)
      PathPoint P4: femur_r (-0.0156 -0.1016 0.0419)
    Thelen2003Muscle glut_max3_r: max_isometric_force=552 optimal_fiber_length=0.144 tendon_slack_length=0.145
        pennation_angle_at_optimal=0.08726646
      PathPoint P1: pelvis (-0.1556 -0.0314 0.0058)
      PathPoint P2: pelvis (-0.1529 -0.1052 0.0403)
      PathPoint P3: femur_r (-0.0299 -0.1041 0.0135)
      PathPoint P4: femur_r (-0.006 -0.1419 0.0411)
    Thelen2003Muscle iliacus_r: max_isometric_force=1073 optimal_fiber_length=0.1 tendon_slack_length=0.1
        pennation_angle_at_optimal=0.1221731
      PathPoint P1: pelvis (-0.0674 0.0365 0.0854)
      PathPoint P2: pelvis (-0.0258 -0.055 0.0811)
      ConditionalPathPoint P3: pelvis (-0.0288 -0.0805 0.0816) range=(-1.570796 0.7853982) coordinate=hip_flexion_r
      PathPoint P4: femur_r (0.0017 -0.0543 0.0057)
      PathPoint P5: femur_r (-0.0193 -0.0621 0.0129)
    Thelen2003Muscle psoas_r: max_isometric_force=1113 optimal_fiber_length=0.1 tendon_slack_length=0.16
        pennation_angle_at_optimal=0.1396263
      PathPoint P1: pelvis (-0.0647 0.0887 0.0289)
      PathPoint P2: pelvis (-0.0238 -0.057 0.0759)
      ConditionalPathPoint P3: pelvis (-0.0288 -0.0805 0.0816) range=(-1.570796 0.7853982) coordinate=hip_flexion_r
      PathPoint P4: femur_r (0.0016 -0.0507 0.0038)
      PathPoint P5: femur_r (-0.0188 -0.0597 0.0104)
    Thelen2003Muscle quad_fem_r: max_isometric_force=381 optimal_fiber_length=0.054 tendon_slack_length=0.024
        pennation_angle_at_optimal=0
      PathPoint P1: pelvis (-0.1143 -0.1151 0.052)
      PathPoint P2: femur_r (-0.0381 -0.0359 0.0366)
    Thelen2003Muscle gem_r: max_isometric_force=164 optimal_fiber_length=0.024 tendon_slack_length=0.039
        pennation_angle_at_optimal=0
      PathPoint P1: pelvis (-0.1133 -0.082 0.0714)
      PathPoint P2: femur_r (-0.0142 -0.0033 0.0443)
    Thelen2003Muscle peri_r: max_isometric_force=444 optimal_fiber_length=0.026 tendon_slack_length=0.115
        pennation_angle_at_optimal=0.1745329
      PathPoint P1: pelvis (-0.1396 0.0003 0.0235)
      PathPoint P2: pelvis (-0.1193 -0.0276 0.0657)
      PathPoint P3: femur_r (-0.0148 -0.0036 0.0437)
    Thelen2003Muscle patellar_tendon_r: min_control=0.01 max_isometric_force=100 optimal_fiber_length=0.05
        tendon_slack_length=0.005 pennation_angle_at_optimal=0
      PathPoint P1: tibia_r (0.039 -0.0822 0)
      PathPoint P2: patella_r (0.0021 0.0015 0.0001)
    Thelen2003Muscle rect_fem_r: max_isometric_force=1169 optimal_fiber_length=0.114 tendon_slack_length=0.31
        pennation_angle_at_optimal=0.08726646
      PathPoint P1: pelvis (-0.0295 -0.0311 0.0968)
      ConditionalPathPoint P2: femur_r (0.0334 -0.403 0.0019) range=(-2.617994 -1.459968) coordinate=knee_extend_r
      PathPoint default: patella_r (0.01210022 0.04369986 0.0014)
    Thelen2003Muscle vas_int_r: max_isometric_force=5000 optimal_fiber_length=0.107 tendon_slack_length=0.116
        pennation_angle_at_optimal=0.05235988
      PathPoint P1: femur_r (0.029 -0.1924 0.031)
      PathPoint P2: femur_r (0.0335 -0.2084 0.0285)
      ConditionalPathPoint P3: femur_r (0.0343 -0.403 0.0055) range=(-2.617994 -1.42) coordinate=knee_extend_r
      PathPoint default: patella_r (0.00580079 0.04798593 0.0018)
    Thelen2003Muscle med_gas_r: max_isometric_force=2500 optimal_fiber_length=0.09 tendon_slack_length=0.36
        pennation_angle_at_optimal=0.296706
      PathPoint P1: femur_r (-0.019 -0.3929 -0.0235)
      ConditionalPathPoint P2: femur_r (-0.03 -0.4022 -0.0258) range=(-0.7853982 0.1745329) coordinate=knee_extend_r
      PathPoint P3: calcn_r (0 0.031 -0.0053)
    Thelen2003Muscle soleus_r: max_isometric_force=4000 optimal_fiber_length=0.05 tendon_slack_length=0.25
        pennation_angle_at_optimal=0.4363323
      PathPoint P1: tibia_r (-0.0024 -0.1533 0.0071)
      PathPoint P2: calcn_r (0 0.031 -0.0053)
    Thelen2003Muscle tib_post_r: max_isometric_force=3600 optimal_fiber_length=0.031 tendon_slack_length=0.31
        pennation_angle_at_optimal=0.2094395
      PathPoint P1: tibia_r (-0.0094 -0.1348 0.0019)
      PathPoint P2: tibia_r (-0.0144 -0.4051 -0.0229)
      PathPoint P3: calcn_r (0.0417 0.0334 -0.0286)
      PathPoint P4: calcn_r (0.0772 0.0159 -0.0281)
    Thelen2003Muscle tib_ant_r: max_isometric_force=3000 optimal_fiber_length=0.098 tendon_slack_length=0.223
        pennation_angle_at_optimal=0.08726646
      PathPoint P1: tibia_r (0.0179 -0.1624 0.0115)
      PathPoint P2: tibia_r (0.0329 -0.3951 -0.0177)
      PathPoint P3: calcn_r (0.1166 0.0178 -0.0305)
    Thelen2003Muscle glut_med1_l: max_isometric_force=1119 optimal_fiber_length=0.0535 tendon_slack_length=0.078
        pennation_angle_at_optimal=0.1396263
      PathPoint P1: pelvis (-0.0408 0.0304 -0.1209)
      PathPoint P2: femur_l (-0.0218 -0.0117 -0.0555)
    Thelen2003Muscle glut_med2_l: max_isometric_force=873 optimal_fiber_length=0.0845 tendon_slack_length=0.053
        pennation_angle_at_optimal=0
      PathPoint P1: pelvis (-0.0855 0.0445 -0.0766)
      PathPoint P2: femur_l (-0.0258 -0.0058 -0.0527)
    Thelen2003Muscle glut_med3_l: max_isometric_force=1000 optimal_fiber_length=0.0646 tendon_slack_length=0.053
        pennation_angle_at_optimal=0.3316126
      PathPoint P1: pelvis (-0.1223 0.0105 -0.0648)
      PathPoint P2: femur_l (-0.0309 -0.0047 -0.0518)
    Thelen2003Muscle bifemlh_l: max_isometric_force=2700 optimal_fiber_length=0.109 tendon_slack_length=0.326
        pennation_angle_at_optimal=0
      PathPoint P1: pelvis (-0.12596 -0.10257 -0.06944)
      PathPoint P2: tibia_l (-0.0301 -0.036 -0.02943)
      PathPoint P3: tibia_l (-0.0234 -0.0563 -0.0343)
    Thelen2003Muscle bifemsh_l: max_isometric_force=804 optimal_fiber_length=0.173 tendon_slack_length=0.089
        pennation_angle_at_optimal=0.4014257
      PathPoint P1: femur_l (0.005 -0.2111 -0.0234)
      PathPoint P2: tibia_l (-0.0301 -0.036 -0.02943)
      PathPoint P3: tibia_l (-0.0234 -0.0563 -0.0343)
    Thelen2003Muscle sar_l: max_isometric_force=156 optimal_fiber_length=0.52 tendon_slack_length=0.1
        pennation_angle_at_optimal=0
      PathPoint P1: pelvis (-0.0153 -0.0013 -0.1242)
      PathPoint P2: femur_l (-0.003 -0.3568 0.0421)
      PathPoint P3: tibia_l (-0.0056 -0.0419 0.0399)
      PathPoint P4: tibia_l (0.006 -0.0589 0.0383)
      PathPoint P5: tibia_l (0.0243 -0.084 0.0252)
    Thelen2003Muscle add_mag2_l: max_isometric_force=2343 optimal_fiber_length=0.121 tendon_slack_length=0.12
        pennation_angle_at_optimal=0.05235988
      PathPoint P1: pelvis (-0.0831 -0.1192 -0.0308)
      PathPoint P2: femur_l (0.0054 -0.2285 -0.0227)
    Thelen2003Muscle tfl_l: max_isometric_force=233 optimal_fiber_length=0.095 tendon_slack_length=0.425
        pennation_angle_at_optimal=0.05235988
      PathPoint P1: pelvis (-0.0311 0.0214 -0.1241)
      PathPoint P2: femur_l (0.0294 -0.0995 -0.0597)
      PathPoint P3: femur_l (0.0054 -0.4049 -0.0357)
      PathPoint P4: tibia_l (0.006 -0.0487 -0.0297)
    Thelen2003Muscle pect_l: max_isometric_force=266 optimal_fiber_length=0.1 tendon_slack_length=0.033
        pennation_angle_at_optimal=0
      PathPoint P1: pelvis (-0.0431 -0.0768 -0.0451)
      PathPoint P2: femur_l (-0.0122 -0.0822 -0.0253)
    Thelen2003Muscle grac_l: max_isometric_force=162 optimal_fiber_length=0.352 tendon_slack_length=0.126
        pennation_angle_at_optimal=0.05235988
      PathPoint P1: pelvis (-0.07401 -0.1187 -0.02794)
      ConditionalPathPoint P2: tibia_l (-0.02657 -0.0319 0.03774) range=(-0.4363323 0.1745329) coordinate=knee_extend_l
      PathPoint P3: tibia_l (-0.01943 -0.05153 0.0358)
      PathPoint P4: tibia_l (0.006 -0.0836 0.0228)
    Thelen2003Muscle glut_max1_l: max_isometric_force=573 optimal_fiber_length=0.142 tendon_slack_length=0.125
        pennation_angle_at_optimal=0.08726646
      PathPoint P1: pelvis (-0.1195 0.0612 -0.07)
      PathPoint P2: pelvis (-0.1291 0.0012 -0.0886)
      PathPoint P3: femur_l (-0.0457 -0.0248 -0.0392)
      PathPoint P4: femur_l (-0.0277 -0.0566 -0.047)
    Thelen2003Muscle glut_max2_l: max_isometric_force=819 optimal_fiber_length=0.147 tendon_slack_length=0.127
        pennation_angle_at_optimal=0
      PathPoint P1: pelvis (-0.1349 0.0176 -0.0563)
      PathPoint P2: pelvis (-0.1376 -0.052 -0.0914)
      PathPoint P3: femur_l (-0.0426 -0.053 -0.0293)
      PathPoint P4: femur_l (-0.0156 -0.1016 -0.0419)
    Thelen2003Muscle glut_max3_l: max_isometric_force=552 optimal_fiber_length=0.144 tendon_slack_length=0.145
        pennation_angle_at_optimal=0.08726646
      PathPoint P1: pelvis (-0.1556 -0.0314 -0.0058)
      PathPoint P2: pelvis (-0.1529 -0.1052 -0.0403)
      PathPoint P3: femur_l (-0.0299 -0.1041 -0.0135)
      PathPoint P4: femur_l (-0.006 -0.1419 -0.0411)
    Thelen2003Muscle iliacus_l: max_isometric_force=1073 optimal_fiber_length=0.1 tendon_slack_length=0.1
        pennation_angle_at_optimal=0.1221731
      PathPoint P1: pelvis (-0.0674 0.0365 -0.0854)
      PathPoint P2: pelvis (-0.0258 -0.055 -0.0811)
      ConditionalPathPoint P3: pelvis (-0.0288 -0.0805 -0.0816) range=(-1.570796 0.7853982) coordinate=hip_flexion_l
      PathPoint P4: femur_l (0.0017 -0.0543 -0.0057)
      PathPoint P5: femur_l (-0.0193 -0.0621 -0.0129)
    Thelen2003Muscle psoas_l: max_isometric_force=1113 optimal_fiber_length=0.1 tendon_slack_length=0.16
        pennation_angle_at_optimal=0.1396263
      PathPoint P1: pelvis (-0.0647 0.0887 -0.0289)
      PathPoint P2: pelvis (-0.0238 -0.057 -0.0759)
      ConditionalPathPoint P3: pelvis (-0.0288 -0.0805 -0.0816) range=(-1.570796 0.7853982) coordinate=hip_flexion_l
      PathPoint P4: femur_l (0.0016 -0.0507 -0.0038)
      PathPoint P5: femur_l (-0.0188 -0.0597 -0.0104)
    Thelen2003Muscle quad_fem_l: max_isometric_force=381 optimal_fiber_length=0.054 tendon_slack_length=0.024
        pennation_angle_at_optimal=0
      PathPoint P1: pelvis (-0.1143 -0.1151 -0.052)
      PathPoint P2: femur_l (-0.0381 -0.0359 -0.0366)
    Thelen2003Muscle gem_l: max_isometric_force=164 optimal_fiber_length=0.024 tendon_slack_length=0.039
        pennation_angle_at_optimal=0
      PathPoint P1: pelvis (-0.1133 -0.082 -0.0714)
      PathPoint P2: femur_l (-0.0142 -0.0033 -0.0443)
    Thelen2003Muscle peri_l: max_isometric_force=444 optimal_fiber_length=0.026 tendon_slack_length=0.115
        pennation_angle_at_optimal=0.1745329
      PathPoint P1: pelvis (-0.1396 0.0003 -0.0235)
      PathPoint P2: pelvis (-0.1193 -0.0276 -0.0657)
      PathPoint P3: femur_l (-0.0148 -0.0036 -0.0437)
    Thelen2003Muscle patellar_tendon_l: min_control=0.01 max_isometric_force=100 optimal_fiber_length=0.05
        tendon_slack_length=0.005 pennation_angle_at_optimal=0
      PathPoint P1: tibia_l (0.039 -0.0822 0)
      PathPoint P2: patella_l (0.0021 0.0015 -0.0001)
    Thelen2003Muscle rect_fem_l: max_isometric_force=1169 optimal_fiber_length=0.114 tendon_slack_length=0.31
        pennation_angle_at_optimal=0.08726646
      PathPoint P1: pelvis (-0.0295 -0.0311 -0.0968)
      ConditionalPathPoint P2: femur_l (0.0334 -0.403 -0.0019) range=(-2.617994 -1.459968) coordinate=knee_extend_l
      PathPoint default: patella_l (0.01209332 0.04369993 -0.0014)
    Thelen2003Muscle vas_int_l: max_isometric_force=5000 optimal_fiber_length=0.107 tendon_slack_length=0.116
        pennation_angle_at_optimal=0.05235988
      PathPoint P1: femur_l (0.029 -0.1924 -0.031)
      PathPoint P2: femur_l (0.0335 -0.2084 -0.0285)
      ConditionalPathPoint P3: femur_l (0.0343 -0.403 -0.0055) range=(-2.617994 -1.42) coordinate=knee_extend_l
      PathPoint default: patella_l (0.00579288 0.04799926 -0.0018)
    Thelen2003Muscle med_gas_l: max_isometric_force=2500 optimal_fiber_length=0.09 tendon_slack_length=0.36
        pennation_angle_at_optimal=0.296706
      PathPoint P1: femur_l (-0.019 -0.3929 0.0235)
      ConditionalPathPoint P2: femur_l (-0.03 -0.4022 0.0258) range=(-0.7853982 0.1745329) coordinate=knee_extend_l
      PathPoint P3: calcn_l (0 0.031 0.0053)
    Thelen2003Muscle soleus_l: max_isometric_force=4000 optimal_fiber_length=0.05 tendon_slack_length=0.25
        pennation_angle_at_optimal=0.4363323
      PathPoint P1: tibia_l (-0.0024 -0.1533 -0.0071)
      PathPoint P2: calcn_l (0 0.031 0.0053)
    Thelen2003Muscle tib_post_l: max_isometric_force=3600 optimal_fiber_length=0.031 tendon_slack_length=0.31
        pennation_angle_at_optimal=0.2094395
      PathPoint P1: tibia_l (-0.0094 -0.1348 -0.0019)
      PathPoint P2: tibia_l (-0.0144 -0.4051 0.0229)
      PathPoint P3: calcn_l (0.0417 0.0334 0.0286)
      PathPoint P4: calcn_l (0.0772 0.0159 0.0281)
    Thelen2003Muscle tib_ant_l: max_isometric_force=3000 optimal_fiber_length=0.098 tendon_slack_length=0.223
        pennation_angle_at_optimal=0.08726646
      PathPoint P1: tibia_l (0.0179 -0.1624 -0.0115)
      PathPoint P2: tibia_l (0.0329 -0.3951 0.0177)
      PathPoint P3: calcn_l (0.1166 0.0178 0.0305)
    Thelen2003Muscle ercspn_r: max_isometric_force=2500 optimal_fiber_length=0.12 tendon_slack_length=0.03
        pennation_angle_at_optimal=0
      PathPoint P1: pelvis (-0.14 0.0439 0.0436)
      PathPoint P2: torso (-0.055 0.11 0.0241)
    Thelen2003Muscle ercspn_l: max_isometric_force=2500 optimal_fiber_length=0.12 tendon_slack_length=0.03
        pennation_angle_at_optimal=0
      PathPoint P1: pelvis (-0.14 0.0439 -0.0436)
      PathPoint P2: torso (-0.055 0.11 -0.0241)
    Thelen2003Muscle intobl_r: max_isometric_force=900 optimal_fiber_length=0.1 tendon_slack_length=0.1
        pennation_angle_at_optimal=0
      PathPoint P1: pelvis (-0.04 0.07 0.1157)
      PathPoint P2: torso (0.07 0.16 0.015)
    Thelen2003Muscle intobl_l: max_isometric_force=900 optimal_fiber_length=0.1 tendon_slack_length=0.1
        pennation_angle_at_optimal=0
      PathPoint P1: pelvis (-0.04 0.07 -0.1157)
      PathPoint P2: torso (0.07 0.16 -0.015)
    Thelen2003Muscle extobl_r: max_isometric_force=900 optimal_fiber_length=0.12 tendon_slack_length=0.14
        pennation_angle_at_optimal=0
      PathPoint P1: pelvis (-0.03 -0.0636 0.01)
      PathPoint P2: torso (0.065 0.11 0.11)
    Thelen2003Muscle extobl_l: max_isometric_force=900 optimal_fiber_length=0.12 tendon_slack_length=0.14
        pennation_angle_at_optimal=0
      PathPoint P1: pelvis (-0.03 -0.0636 -0.01)
      PathPoint P2: torso (0.065 0.11 -0.11)
    ObjectGroup R_hip_abd: members=(glut_max1_r glut_med1_r glut_med2_r glut_med3_r peri_r sar_r tfl_r)
    ObjectGroup R_hip_flex: members=(glut_med1_r grac_r iliacus_r pect_r psoas_r rect_fem_r sar_r tfl_r)
    ObjectGroup R_hip_inrot: members=(glut_med1_r iliacus_r psoas_r tfl_r)
    ObjectGroup R_hip_exrot: members=(gem_r glut_med3_r peri_r quad_fem_r)
    ObjectGroup R_hip_ext: members=(add_mag2_r bifemlh_r glut_max1_r glut_max2_r glut_max3_r glut_med3_r)
    ObjectGroup R_hip_add: members=(add_mag2_r bifemlh_r grac_r pect_r)
    ObjectGroup R_knee_bend: members=(bifemlh_r bifemsh_r grac_r med_gas_r sar_r)
    ObjectGroup R_knee_ext: members=(rect_fem_r vas_int_r patellar_tendon_r)
    ObjectGroup R_ankle_pf: members=(med_gas_r soleus_r tib_post_r)
    ObjectGroup R_inverter: members=(tib_ant_r tib_post_r)
    ObjectGroup R_ankle_df: members=tib_ant_r
    ObjectGroup L_hip_abd: members=(glut_max1_l glut_med1_l glut_med2_l glut_med3_l peri_l sar_l tfl_l)
    ObjectGroup L_hip_flex: members=(glut_med1_l grac_l iliacus_l pect_l psoas_l rect_fem_l sar_l tfl_l)
    ObjectGroup L_hip_inrot: members=(glut_med1_l iliacus_l psoas_l tfl_l)
    ObjectGroup L_hip_exrot: members=(gem_l glut_med3_l peri_l quad_fem_l)
    ObjectGroup L_hip_ext: members=(add_mag2_l bifemlh_l glut_max1_l glut_max2_l glut_max3_l glut_med3_l)
    ObjectGroup L_hip_add: members=(add_mag2_l bifemlh_l grac_l pect_l)
    ObjectGroup L_knee_bend: members=(bifemlh_l bifemsh_l grac_l med_gas_l sar_l)
    ObjectGroup L_knee_ext: members=(rect_fem_l vas_int_l patellar_tendon_l)
    ObjectGroup L_ankle_pf: members=(med_gas_l soleus_l tib_post_l)
    ObjectGroup L_inverter: members=(tib_ant_l tib_post_l)
    ObjectGroup L_ankle_df: members=tib_ant_l
    ObjectGroup back_ext: members=(ercspn_l ercspn_r)
    ObjectGroup back_rlb: members=(ercspn_r extobl_r intobl_r)
    ObjectGroup back_introt: members=(ercspn_r extobl_l intobl_r)
    ObjectGroup back_llb: members=(ercspn_l extobl_l intobl_l)
    ObjectGroup back_extrot: members=(ercspn_l extobl_r intobl_l)
    ObjectGroup back_flex: members=(extobl_l extobl_r intobl_l intobl_r)
    ObjectGroup R_knee_ligament: members=(patellar_tendon_r aACL_r pACL_r aPCL_r pPCL_r LCL_r aMCL_r iMCL_r pMCL_r aDMCL_r pDMCL_r)
    ObjectGroup L_knee_ligament: members=(patellar_tendon_l aACL_l pACL_l aPCL_l pPCL_l LCL_l aMCL_l iMCL_l pMCL_l aDMCL_l pDMCL_l)
  BodySet:
    Body ground: mass=0 mass_center=(0 0 0) inertia_xx=0 inertia_yy=0 inertia_zz=0
    Body pelvis: mass=11.777 mass_center=(-0.0707 0 0) inertia_xx=0.1028 inertia_yy=0.0871 inertia_zz=0.0579
        meshes=(sacrum.vtp pelvis.vtp l_pelvis.vtp)
      CustomJoint ground_pelvis: parent_body=ground location_in_parent=(0 0 0) location=(0 0 0)
        Coordinate pelvis_tilt: motion_type=rotational default_value=0 initial_value=0 range=(-1.570796 1.570796)
            clamped=false
        Coordinate pelvis_list: motion_type=rotational default_value=0 initial_value=0 range=(-1.570796 1.570796)
            clamped=false
        Coordinate pelvis_rotation: motion_type=rotational default_value=0 initial_value=0 range=(-1.570796 1.570796)
            clamped=false
        Coordinate pelvis_tx: motion_type=translational default_value=0 initial_value=0 range=(-5 5) clamped=false
        Coordinate pelvis_ty: motion_type=translational default_value=0 initial_value=0 range=(-1 2) clamped=false
        Coordinate pelvis_tz: motion_type=translational default_value=0 initial_value=0 range=(-3 3) clamped=false
        SpatialTransform:
          TransformAxis rotation1: coordinates=pelvis_tilt axis=(0 0 1) LinearFunction(coefficients=1 0)
          TransformAxis rotation2: coordinates=pelvis_list axis=(1 0 0) LinearFunction(coefficients=1 0)
          TransformAxis rotation3: coordinates=pelvis_rotation axis=(0 1 0) LinearFunction(coefficients=1 0)
          TransformAxis translation1: coordinates=pelvis_tx axis=(1 0 0) LinearFunction(coefficients=1 0)
          TransformAxis translation2: coordinates=pelvis_ty axis=(0 1 0) LinearFunction(coefficients=1 0)
          TransformAxis translation3: coordinates=pelvis_tz axis=(0 0 1) LinearFunction(coefficients=1 0)
    Body femur_r: mass=9.3014 mass_center=(0 -0.17 0) inertia_xx=0.1339 inertia_yy=0.0351 inertia_zz=0.1412
        meshes=femur_r.vtp
      CustomJoint hip_r: parent_body=pelvis location_in_parent=(-0.0707 -0.0661 0.0835) location=(0 0 0)
        Coordinate hip_flexion_r: motion_type=rotational default_value=0 initial_value=0 range=(-2.094395 2.094395)
            clamped=false
        Coordinate hip_adduction_r: motion_type=rotational default_value=0 initial_value=0 range=(-2.094395 2.094395)
            clamped=false
        Coordinate hip_rotation_r: motion_type=rotational default_value=0 initial_value=0 range=(-2.094395 2.094395)
            clamped=false
        SpatialTransform: axes_held_at_zero=(translation1 translation2 translation3)
          TransformAxis rotation1: coordinates=hip_flexion_r axis=(0 0 1) LinearFunction(coefficients=1 0)
          TransformAxis rotation2: coordinates=hip_adduction_r axis=(1 0 0) LinearFunction(coefficients=1 0)
          TransformAxis rotation3: coordinates=hip_rotation_r axis=(0 1 0) LinearFunction(coefficients=1 0)
    Body tibia_r: mass=3.7075 mass_center=(0 -0.1867 0) inertia_xx=0.0504 inertia_yy=0.0051 inertia_zz=0.0511
        meshes=(tibia_r.vtp fibula.vtp)
      CustomJoint knee_r: parent_body=femur_r location_in_parent=(0 0 0) location=(0 0 0)
        Coordinate knee_extend_r: motion_type=rotational default_value=0 initial_value=0 range=(-2.094395 0.1745329)
            clamped=false
        Coordinate knee_rotation_r: motion_type=rotational default_value=0 initial_value=0 range=(-0.7853982 0.5235988)
            clamped=false
        Coordinate knee_adduction_r: motion_type=rotational default_value=0 initial_value=0
            range=(-0.2617993 0.2617993) clamped=false
        Coordinate knee_tx_r: motion_type=translational default_value=0 initial_value=0 range=(-0.02 0.02)
            clamped=false
        Coordinate knee_ty_r: motion_type=translational default_value=0 initial_value=0 range=(-0.03 0.03)
            clamped=false
        Coordinate knee_tz_r: motion_type=translational default_value=0 initial_value=0 range=(-0.02 0.02)
            clamped=false
        SpatialTransform:
          TransformAxis rotation1: coordinates=knee_extend_r axis=(0 0 1) LinearFunction(coefficients=1 0)
          TransformAxis rotation2: coordinates=knee_rotation_r axis=(0 1 0) LinearFunction(coefficients=1 0)
          TransformAxis rotation3: coordinates=knee_adduction_r axis=(1 0 0) LinearFunction(coefficients=1 0)
          TransformAxis translation1: coordinates=knee_extend_r axis=(1 0 0)
            NaturalCubicSpline: x=(-2.094395 -1.745329 -1.396263 -1.047198 -0.6981317 -0.3490659 -0.1745329 0.1973442 0.337395 0.4901776 1.52146 2.094395)
                y=(-0.0032 0.00179 0.00411 0.0041 0.00212 -0.001 -0.0031 -0.005227 -0.005435 -0.005574 -0.005435 -0.00525)
          TransformAxis translation2: coordinates=knee_extend_r axis=(0 1 0)
            NaturalCubicSpline: x=(-2.094395 -1.22173 -0.5235988 -0.3490659 -0.1745329 0.1591486 2.094395)
                y=(-0.4226 -0.4082 -0.399 -0.3976 -0.3966 -0.395264 -0.396)
          TransformAxis translation3: coordinates=knee_tz_r axis=(0 0 1) LinearFunction(coefficients=1 0)
    Body patella_r: mass=0.0862 mass_center=(0.0018 0.0264 0) inertia_xx=0.00000287 inertia_yy=0.00001311
        inertia_zz=0.00001311 meshes=patella_r.vtp
      CustomJoint tib_pat_r: parent_body=tibia_r location_in_parent=(0 0 0) location=(0 0 0)
        Coordinate knee_extend_pat_r: motion_type=rotational default_value=0.1678309 initial_value=0 range=(-2.094 10)
            clamped=true
        SpatialTransform: axes_held_at_zero=(rotation2 rotation3 translation3)
          TransformAxis rotation1: coordinates=knee_extend_pat_r axis=(0 0 1)
            NaturalCubicSpline: x=(-2.094395 -1.999973 -1.457524 -0.5263913 0.02792527 0.1745329)
                y=(0.3080506 0.3080506 0.3063053 0.270177 -0.03700098 -0.2799508)
          TransformAxis translation1: coordinates=knee_extend_pat_r axis=(1 0 0)
            MultiplierFunction: scale=1
              NaturalCubicSpline: x=(-2.094395 -1.396263 -1.047198 -0.6981317 -0.3490659 -0.1745329 0 0.00017453 0.00034907 0.08726646 2.094395)
                  y=(0.0173 0.0324 0.0381 0.043 0.0469 0.0484 0.0496 0.0496 0.0496 0.0496 0.0496)
          TransformAxis translation2: coordinates=knee_extend_pat_r axis=(0 1 0)
            MultiplierFunction: scale=1
              NaturalCubicSpline: x=(-2.094395 -1.570796 -1.396263 -1.047198 -0.6981317 -0.3490659 -0.1745329 0 0.00017453 0.00034907 0.08726646 2.094395)
                  y=(-0.0219 -0.0202 -0.02 -0.0204 -0.0211 -0.0219 -0.0223 -0.0227 -0.0227 -0.0227 -0.0227 -0.0227)
    Body talus_r: mass=0.1 mass_center=(0 0 0) inertia_xx=0.001 inertia_yy=0.001 inertia_zz=0.001 meshes=talus.vtp
      CustomJoint ankle_r: parent_body=tibia_r location_in_parent=(0 -0.43 0) location=(0 0 0)
        Coordinate ankle_angle_r: motion_type=rotational default_value=0 initial_value=0 range=(-1.570796 1.570796)
            clamped=false
        SpatialTransform: axes_held_at_zero=(rotation2 rotation3 translation1 translation2 translation3)
          TransformAxis rotation1: coordinates=ankle_angle_r axis=(-0.1050135 -0.1740224 0.9791263)
              LinearFunction(coefficients=1 0)
    Body calcn_r: mass=1.25 mass_center=(0.1 0.03 0) inertia_xx=0.0014 inertia_yy=0.0039 inertia_zz=0.0041
        meshes=foot.vtp
      CustomJoint subtalar_r: parent_body=talus_r location_in_parent=(-0.04877 -0.04195 0.00792) location=(0 0 0)
        Coordinate subtalar_angle_r: motion_type=rotational default_value=0 initial_value=0 range=(-1.570796 1.570796)
            clamped=false
        SpatialTransform: axes_held_at_zero=(rotation2 rotation3 translation1 translation2 translation3)
          TransformAxis rotation1: coordinates=subtalar_angle_r axis=(0.7871796 0.6047475 -0.1209495)
              LinearFunction(coefficients=1 0)
    Body toes_r: mass=0.2166 mass_center=(0.0346 0.006 -0.0175) inertia_xx=0.0001 inertia_yy=0.0002 inertia_zz=0.0001
        meshes=bofoot.vtp
      CustomJoint mtp_r: parent_body=calcn_r location_in_parent=(0.1788 -0.002 0.00108) location=(0 0 0)
        Coordinate mtp_angle_r: motion_type=rotational default_value=0 initial_value=0 range=(-1.570796 1.570796)
            clamped=false
        SpatialTransform: axes_held_at_zero=(rotation2 rotation3 translation1 translation2 translation3)
          TransformAxis rotation1: coordinates=mtp_angle_r axis=(-0.5809544 0 0.8139361)
              LinearFunction(coefficients=1 0)
    Body femur_l: mass=9.3014 mass_center=(0 -0.17 0) inertia_xx=0.1339 inertia_yy=0.0351 inertia_zz=0.1412
        meshes=femur_l.vtp
      CustomJoint hip_l: parent_body=pelvis location_in_parent=(-0.0707 -0.0661 -0.0835) location=(0 0 0)
        Coordinate hip_flexion_l: motion_type=rotational default_value=0 initial_value=0 range=(-2.094395 2.094395)
            clamped=false
        Coordinate hip_adduction_l: motion_type=rotational default_value=0 initial_value=0 range=(-2.094395 2.094395)
            clamped=false
        Coordinate hip_rotation_l: motion_type=rotational default_value=0 initial_value=0 range=(-2.094395 2.094395)
            clamped=false
        SpatialTransform: axes_held_at_zero=(translation1 translation2 translation3)
          TransformAxis rotation1: coordinates=hip_flexion_l axis=(0 0 1) LinearFunction(coefficients=1 0)
          TransformAxis rotation2: coordinates=hip_adduction_l axis=(-1 0 0) LinearFunction(coefficients=1 0)
          TransformAxis rotation3: coordinates=hip_rotation_l axis=(0 -1 0) LinearFunction(coefficients=1 0)
    Body tibia_l: mass=3.7075 mass_center=(0 -0.1867 0) inertia_xx=0.0504 inertia_yy=0.0051 inertia_zz=0.0511
        meshes=(tibia_l.vtp l_fibula.vtp)
      CustomJoint knee_l: parent_body=femur_l location_in_parent=(0 0 0) location=(0 0 0)
        Coordinate knee_extend_l: motion_type=rotational default_value=0 initial_value=0 range=(-2.094395 0.1745329)
            clamped=false
        Coordinate knee_rotation_l: motion_type=rotational default_value=0 initial_value=0 range=(-0.7853982 0.5235988)
            clamped=false
        Coordinate knee_adduction_l: motion_type=rotational default_value=0 initial_value=0
            range=(-0.2617994 0.2617994) clamped=false
        Coordinate knee_tx_l: motion_type=translational default_value=0 initial_value=0 range=(-0.02 0.02)
            clamped=false
        Coordinate knee_ty_l: motion_type=translational default_value=0 initial_value=0 range=(-0.03 0.03)
            clamped=false
        Coordinate knee_tz_l: motion_type=translational default_value=0 initial_value=0 range=(-0.02 0.02)
            clamped=false
        SpatialTransform:
          TransformAxis rotation1: coordinates=knee_extend_l axis=(0 0 1) LinearFunction(coefficients=1 0)
          TransformAxis rotation2: coordinates=knee_rotation_l axis=(0 -1 0) LinearFunction(coefficients=1 0)
          TransformAxis rotation3: coordinates=knee_adduction_l axis=(-1 0 0) LinearFunction(coefficients=1 0)
          TransformAxis translation1: coordinates=knee_extend_l axis=(1 0 0)
            NaturalCubicSpline: x=(-2.094395 -1.745329 -1.396263 -1.047198 -0.6981317 -0.3490659 -0.1745329 0.1973442 0.337395 0.4901776 1.52146 2.094395)
                y=(-0.0032 0.00179 0.00411 0.0041 0.00212 -0.001 -0.0031 -0.005227 -0.005435 -0.005574 -0.005435 -0.00525)
          TransformAxis translation2: coordinates=knee_extend_l axis=(0 1 0)
            NaturalCubicSpline: x=(-2.094395 -1.22173 -0.5235988 -0.3490659 -0.1745329 0.1591486 2.094395)
                y=(-0.4226 -0.4082 -0.399 -0.3976 -0.3966 -0.395264 -0.396)
          TransformAxis translation3: coordinates=knee_tz_l axis=(0 0 1) LinearFunction(coefficients=1 0)
    Body patella_l: mass=0.0862 mass_center=(0.0018 0.0264 0) inertia_xx=0.00000287 inertia_yy=0.00001311
        inertia_zz=0.00001311 meshes=patella_l.vtp
      CustomJoint tib_pat_l: parent_body=tibia_l location_in_parent=(0 0 0) location=(0 0 0)
        Coordinate knee_extend_pat_l: motion_type=rotational default_value=0.1745329 initial_value=0 range=(-2.094 10)
            clamped=true
        SpatialTransform: axes_held_at_zero=(rotation2 rotation3 translation3)
          TransformAxis rotation1: coordinates=knee_extend_pat_l axis=(0 0 1)
            NaturalCubicSpline: x=(-2.094395 -1.999973 -1.457524 -0.5263913 0.02792527 0.1745329)
                y=(0.3080506 0.3080506 0.3063053 0.270177 -0.03700098 -0.2799508)
          TransformAxis translation1: coordinates=knee_extend_pat_l axis=(1 0 0)
            MultiplierFunction: scale=1
              NaturalCubicSpline: x=(-2.094395 -1.396263 -1.047198 -0.6981317 -0.3490659 -0.1745329 0 0.00017453 0.00034907 0.08726646 2.094395)
                  y=(0.0173 0.0324 0.0381 0.043 0.0469 0.0484 0.0496 0.0496 0.0496 0.0496 0.0496)
          TransformAxis translation2: coordinates=knee_extend_pat_l axis=(0 1 0)
            MultiplierFunction: scale=1
              NaturalCubicSpline: x=(-2.094395 -1.570796 -1.396263 -1.047198 -0.6981317 -0.3490659 -0.1745329 0 0.00017453 0.00034907 0.08726646 2.094395)
                  y=(-0.0219 -0.0202 -0.02 -0.0204 -0.0211 -0.0219 -0.0223 -0.0227 -0.0227 -0.0227 -0.0227 -0.0227)
    Body talus_l: mass=0.1 mass_center=(0 0 0) inertia_xx=0.001 inertia_yy=0.001 inertia_zz=0.001 meshes=l_talus.vtp
      CustomJoint ankle_l: parent_body=tibia_l location_in_parent=(0 -0.43 0) location=(0 0 0)
        Coordinate ankle_angle_l: motion_type=rotational default_value=0 initial_value=0 range=(-1.047198 1.047198)
            clamped=false
        SpatialTransform: axes_held_at_zero=(rotation2 rotation3 translation1 translation2 translation3)
          TransformAxis rotation1: coordinates=ankle_angle_l axis=(0.1050135 0.1740224 0.9791263)
              LinearFunction(coefficients=1 0)
    Body calcn_l: mass=1.25 mass_center=(0.1 0.03 0) inertia_xx=0.0014 inertia_yy=0.0039 inertia_zz=0.0041
        meshes=l_foot.vtp
      CustomJoint subtalar_l: parent_body=talus_l location_in_parent=(-0.04877 -0.04195 -0.00792) location=(0 0 0)
        Coordinate subtalar_angle_l: motion_type=rotational default_value=0 initial_value=0 range=(-1.570796 1.570796)
            clamped=false
        SpatialTransform: axes_held_at_zero=(rotation2 rotation3 translation1 translation2 translation3)
          TransformAxis rotation1: coordinates=subtalar_angle_l axis=(-0.7871796 -0.6047475 -0.1209495)
              LinearFunction(coefficients=1 0)
    Body toes_l: mass=0.2166 mass_center=(0.0346 0.006 0.0175) inertia_xx=0.0001 inertia_yy=0.0002 inertia_zz=0.0001
        meshes=l_bofoot.vtp
      CustomJoint mtp_l: parent_body=calcn_l location_in_parent=(0.1788 -0.002 -0.00108) location=(0 0 0)
        Coordinate mtp_angle_l: motion_type=rotational default_value=0 initial_value=0 range=(-1.047198 1.047198)
            clamped=false
        SpatialTransform: axes_held_at_zero=(rotation2 rotation3 translation1 translation2 translation3)
          TransformAxis rotation1: coordinates=mtp_angle_l axis=(0.5809544 0 0.8139361)
              LinearFunction(coefficients=1 0)
    Body torso: mass=34.2366 mass_center=(-0.03 0.32 0) inertia_xx=1.4745 inertia_yy=0.7555 inertia_zz=1.4314
        meshes=(hat_spine.vtp hat_jaw.vtp hat_skull.vtp hat_ribs.vtp)
      CustomJoint back: parent_body=pelvis location_in_parent=(-0.1007 0.0815 0) location=(0 0 0)
        Coordinate lumbar_extension: motion_type=rotational default_value=0 initial_value=0 range=(-1.570796 1.570796)
            clamped=false
        Coordinate lumbar_bending: motion_type=rotational default_value=0 initial_value=0 range=(-1.570796 1.570796)
            clamped=false
        Coordinate lumbar_rotation: motion_type=rotational default_value=0 initial_value=0 range=(-1.570796 1.570796)
            clamped=false
        SpatialTransform: axes_held_at_zero=(translation1 translation2 translation3)
          TransformAxis rotation1: coordinates=lumbar_extension axis=(0 0 1) LinearFunction(coefficients=1 0)
          TransformAxis rotation2: coordinates=lumbar_bending axis=(1 0 0) LinearFunction(coefficients=1 0)
          TransformAxis rotation3: coordinates=lumbar_rotation axis=(0 1 0) LinearFunction(coefficients=1 0)
  ConstraintSet:
    CoordinateCouplerConstraint pat_angle_r: independent_coordinate_names=knee_extend_r
        dependent_coordinate_name=knee_extend_pat_r scale_factor=1
        coupled_coordinates_function=LinearFunction(coefficients=1 0)
    CoordinateCouplerConstraint pat_angle_l: independent_coordinate_names=knee_extend_l
        dependent_coordinate_name=knee_extend_pat_l scale_factor=1
        coupled_coordinates_function=LinearFunction(coefficients=1 0)
